OpenVSP model (file version 5), 6 components.
Geometry view with OpenVSP parameter names; values to 6 digits, angles in degrees, lengths in the model's unit.
Overall bounding box: X_Min=-18.2604 X_Len=37.5465 Y_Min=-26.0141 Y_Len=52.0281 Z_Min=-4.37616 Z_Len=7.21988

Fuselage "Fuselage"
  location (X Y Z) -17.8804 0 0.76087, rotation 0 6.52174 0
  bounding box size 36.5473 5.26573 7.21988
  mass: Density=3 Shell_Flag=0 Mass_Area=1 Mass_Prior=0
  Design: Length=36
  cross sections:
    n   XLocPercent  YLocPercent  YRotate  ZLocPercent  shape
    0   0            -0.005       0        0            point
    1   0            -0.005       0        0            circle Circle_Diameter=1.84181
    2   0.022973     -0.004       0        0            circle Circle_Diameter=2
    3   0.198499     0            0        -0.003       rounded rectangle RoundRectXSec_Radius=0.2 RoundedRect_Height=4.1 RoundedRect_Width=4.1574
    4   0.268975     0            0        -0.003       rounded rectangle RoundRectXSec_Radius=0.2 RoundedRect_Height=4.1 RoundedRect_Width=4.20896
    5   0.283778     0            0        0.008        rounded rectangle RoundRectXSec_Radius=0.2 RoundedRect_Height=5.1 RoundedRect_Width=5
    6   0.321865     0            0        0.015        rounded rectangle RoundRectXSec_Radius=0.2 RoundedRect_Height=5.65379 RoundedRect_Width=5.02639
    7   0.381243     0            0        0.014        rounded rectangle RoundRectXSec_Radius=0.2 RoundedRect_Height=5.75 RoundedRect_Width=5.25838
    8   0.569564     0            2        0.002        rounded rectangle RoundRectXSec_Radius=0.2 RoundedRect_Height=5.25 RoundedRect_Width=5.25838
    9   0.727413     0            2        0.002        rounded rectangle RoundRectXSec_Radius=0.2 RoundedRect_Height=3.9 RoundedRect_Width=3.6
    10  1            0            0        0            rounded rectangle RoundRectXSec_Radius=0.2 RoundedRect_Height=1.8 RoundedRect_Width=1.41677
    11  1            0            0        0            point

Wing "Wing", child of "Fuselage"
  location (X Y Z) -6.40816 0 0, rotation 0 0 0
  symmetric about XZ
  bounding box size 6.07991 52.0281 1.10632
  totals: TotalSpan=51.1349 TotalProjectedSpan=51.1349 TotalChord=6.06 TotalArea=309.878 TotalAR=8.43811
  root: chord 6.06, twist 2, NACA 5-digit CamberLoc=0.227435 IdealCl=0.832765 ThickChord=0.140909
  sections:
    n  Span     Root_Chord  Tip_Chord  Area     Sweep  Sweep_Location  Dihedral  Twist  Twist_Location  tip airfoil
    1  25.5675  6.06        6.06       154.939  0      0               0         0      0.25            NACA 5-digit CamberLoc=0.224538 IdealCl=0.866894 ThickChord=0.140411
  SS_Control "Flaps": UStart=0.368182 UEnd=0.5175 Length_C_Start=0.25 Length_C_End=0.25 Length_Start=1.51497 Length_End=1.51477 LE_Flag=0 Surf_Type=2
  SS_Control "Ailerons": UStart=0.5175 UEnd=1 Length_C_Start=0.25 Length_C_End=0.25 Length_Start=1.51477 Length_End=1.515 LE_Flag=0 Surf_Type=2

Wing "WingGeom"
  location (X Y Z) 15.1 0 0, rotation 0 0 0
  symmetric about XZ
  bounding box size 4.18605 18 0.418848
  mass: Density=3 Shell_Flag=0 Mass_Area=1 Mass_Prior=0
  totals: TotalSpan=18 TotalProjectedSpan=18 TotalChord=4.17701 TotalArea=75.1861 TotalAR=4.30931
  root: chord 4.18605, twist 0, NACA 4-series Camber=0 CamberLoc=0.2 ThickChord=0.1
  sections:
    n  Span  Root_Chord  Tip_Chord  Area     Sweep  Sweep_Location  Dihedral  Twist  Twist_Location  tip airfoil
    1  9     4.18605     4.16797    37.5931  0      0               0         0      0.25            as above
  SS_Control "Elevator": UStart=0 UEnd=1 Length_C_Start=0.454545 Length_C_End=0.454545 Length_Start=1.90275 Length_End=1.89453 LE_Flag=0 Surf_Type=2

Mesh "MeshGeom"
  location (X Y Z) 0 0 0, rotation 0 0 0

Mesh "MeshGeom"
  location (X Y Z) 0 0 0, rotation 0 0 0

Mesh "MeshGeom"
  location (X Y Z) 0 0 0, rotation 0 0 0

VSPAERO settings: Sref=309.878 bref=51.1349 cref=6.06 Xcg=-1.78704 Ycg=-0.00444356 Zcg=-0.650827 AlphaStart=-10 AlphaEnd=30 AlphaNpts=8 BetaStart=-90 BetaEnd=90 BetaNpts=18 MachStart=0 MachEnd=0 MachNpts=1 ReCref=1e+07 Vinf=100 Rho=0.002377
  control group "Flaps": DeflectionAngle=0
  control group "Ailerons": DeflectionAngle=0
